! User-authorized operating overlay; source files unchanged.
Edit Vsource.source pu=1.04
Edit RegControl.feeder_rega Vreg=123.5
Edit RegControl.feeder_regb Vreg=123.5
Edit RegControl.feeder_regc Vreg=123.5
Edit RegControl.vreg2_a Vreg=123.5
Edit RegControl.vreg2_b Vreg=123.5
Edit RegControl.vreg2_c Vreg=123.5
Edit RegControl.vreg3_a Vreg=123.5
Edit RegControl.vreg3_b Vreg=123.5
Edit RegControl.vreg3_c Vreg=123.5
Edit RegControl.vreg4_a Vreg=123.5
Edit RegControl.vreg4_b Vreg=123.5
Edit RegControl.vreg4_c Vreg=123.5
Edit Capacitor.CAPBank3 states=[0]
